// SBML level 2 version 1

model oscillating_MAPK()

  // Compartments:
  compartment default = 1 volume;
  compartment uVol in default = 1 volume;

  // Species:
  species MKK in uVol = 280/uVol;
  species MKKK in uVol = 90/uVol;
  species MAPK in uVol = 280/uVol;
  species MKKK_P in uVol = 10/uVol;
  species MKK_P in uVol = 10/uVol;
  species MKK_PP in uVol = 10/uVol;
  species MAPK_P in uVol = 10/uVol;
  species MAPK_PP in uVol = 10/uVol;

  // Reactions:
  J0: MKKK => MKKK_P; V1*MKKK/((1 + (MAPK_PP/Ki)^n)*(K1 + MKKK));  // modifiers: MAPK_PP
    V1 = 2.5; Ki = 9; n = 1; K1 = 10;
  J1: MKKK_P => MKKK; V2*MKKK_P/(KK2 + MKKK_P);
    V2 = 0.25; KK2 = 8;
  J2: MKK => MKK_P; k3*MKKK_P*MKK/(KK3 + MKK);  // modifiers: MKKK_P
    k3 = 0.025; KK3 = 15;
  J3: MKK_P => MKK_PP; k4*MKKK_P*MKK_P/(KK4 + MKK_P);  // modifiers: MKKK_P
    k4 = 0.025; KK4 = 15;
  J4: MKK_PP => MKK_P; V5*MKK_PP/(KK5 + MKK_PP);
    V5 = 0.75; KK5 = 15;
  J5: MKK_P => MKK; V6*MKK_P/(KK6 + MKK_P);
    V6 = 0.75; KK6 = 15;
  J6: MAPK => MAPK_P; k7*MKK_PP*MAPK/(KK7 + MAPK);  // modifiers: MKK_PP
    k7 = 0.025; KK7 = 15;
  J7: MAPK_P => MAPK_PP; k8*MKK_PP*MAPK_P/(KK8 + MAPK_P);  // modifiers: MKK_PP
    k8 = 0.025; KK8 = 15;
  J8: MAPK_PP => MAPK_P; V9*MAPK_PP/(KK9 + MAPK_PP);
    V9 = 0.5; KK9 = 15;
  J9: MAPK_P => MAPK; V10*MAPK_P/(KK10 + MAPK_P);
    V10 = 0.5; KK10 = 15;

  // Unit definitions:
  unit substance = mole;
  unit volume = litre;
  unit area = metre^2;
  unit length = metre;
  unit time = second;
end
